*Heading
** Job name: segment1 Model name: Model-1
** Generated by: Abaqus/CAE 2021
*Preprint, echo=NO, model=NO, history=NO, contact=NO
**
*Parameter
**
** final magnitude of the applied magnetic field (Tesla)
magFieldMag = 0.040
**
** applied magnetic field unit vector
magFieldVecX = 0.0
magFieldVecY = 0.866
magFieldVecZ = -0.5
**
**	MATERIAL PARAMETERS
**
** initial magnetic moment density (A/m)
Mx = 0.0
My = 0.0
Mz = 640.0e3*0.2
**
** initial shear modulus (Pa)
Gshear = 850e3
**
** bulk modulus (Pa)
Kbulk = 1000.0*Gshear
**
** number of body integration points
nInt = 8
**
** number of real material properties
nProps = 5
**
** number of integer material properties
nJProps = 1
**
**
*Node, nset=Nall
      1,  0.075000003,           0.,          30.
      2,  0.075000003,           0.,          20.
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*User Element,Nodes=8,Type=U3,Iproperties=<nJProps>,Properties=<nProps>,Coordinates=3,unsymm
1,2,3
*Element, type=U3, elset=mag
 857,   99,    1,   14,   13, 6932, 1799, 1806, 1805
 858,   99,    9,    8,    1, 6932, 1801, 1800, 1799
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*Element, type=C3D8R, elset=ElDummy
100857,99,1,14,13,6932,1799,1806,1805
100858,99,9,8,1,6932,1801,1800,1799
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*Element, type=C3D8R, elset=metal
  1, 6720,  101,  108,  107,   99,    1,   14,   13
  2, 6720,  103,  102,  101,   99,    9,    8,    1
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*Nset, nset=mag-node
     1,     2,     4,     5,     6,     7
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*Nset, nset=BC
   3,  22,  23,  24,  25,  26,  27,  28, 661
*Solid section, elset=ElDummy, material=Dummy, controls=sec_con
*Solid section, elset=metal, material=metal
**
**
**
**
** MATERIALS
*Section controls, hourglass=enhanced, name=sec_con
*Material, name=metal
*Elastic
140e9, 0.3
*Material, name=Dummy
*Elastic
1.e-20
*Conductivity
1.0
*Density
1
**
** ----------------------------------------------------------------
**
************************************************************************
**			MATERIAL DEFINITION
************************************************************************
**
** Material properties for the real material
**
*uel property,elset=mag
<Gshear>,<Kbulk>,<Mx>,<My>,<Mz>,<nInt>
************************************************************************
**			INITIAL CONDITIONS
************************************************************************
*Initial conditions, type=field, variable=1
mag-node,0
*Initial conditions, type=field, variable=2
mag-node,0
*Initial conditions, type=field, variable=3
mag-node,0
*Initial conditions, type=field, variable=4
mag-node,0
**
************************************************************************
**			STEP DEFINITION
************************************************************************
** STEP: Step-1
**
*Step, name=Step-1, nlgeom=YES, inc=100000
*Static,stabilize, factor=0.0002
0.001,1.,1.e-8,0.01
*CONTROLS, PARAMETERS=LINE SEARCH
10,1.0,0.0001,0.25,0.10
**
** BOUNDARY CONDITIONS
**
*Boundary
BC, Encastre
**
** ----------------------------------------------------------------
**
*Field, variable=1
mag-node,<magFieldVecX>
*Field, variable=2
mag-node,<magFieldVecY>
*Field, variable=3
mag-node,<magFieldVecZ>
*Field, variable=4
mag-node,<magFieldMag>
**
**
*Output, field
*node output, nset=Nall
u
*element output, elset=ElDummy
le,ne
**
*End Step
